<neuroml xmlns="http://www.neuroml.org/schema/neuroml2"  xmlns:xs="http://www.w3.org/2001/XMLSchema" xmlns:xsi="http://www.w3.org/2001/XMLSchema-instance" xsi:schemaLocation="http://www.neuroml.org/schema/neuroml2 https://raw.github.com/NeuroML/NeuroML2/development/Schemas/NeuroML2/NeuroML_v2beta4.xsd" id="CerebellarCortexLarge">
    <include href="MossyFiber.cell.nml"></include>
    <include href="Granule_98.cell.nml"></include>
    <include href="Golgi_040408_C1.cell.nml"></include>
    <include href="MF_AMPA.synapse.nml"></include>
    <include href="AMPA_GranGol.synapse.nml"></include>
    <include href="GABAA.synapse.nml"></include>
    <include href="purk2.cell.nml"></include>
    <network id="CerebellarCortexLarge" type="networkWithTemperature" temperature="32.0 degC">
        <notes>Network generated using libNeuroML v0.2.11</notes>
        <population id="MossyFibers" type="populationList" component="MossyFiber" size="1000">
            <instance id="0">
                <location y="13.078001628399999" x="52.363598850899997" z="407.241763670000012"/>
            </instance>
            <instance id="1">
                <location y="135.179831693000011" x="107.700234937999994" z="38.153666102300001"/>
            </instance>
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        </population>
        <population id="Grans" type="populationList" component="Granule_98" size="2200">
            <instance id="0">
                <location y="76.652615808999997" x="504.501689650000003" z="98.132509471700004"/>
            </instance>
            <instance id="1">
                <location y="97.104408699100006" x="475.106815008000012" z="8.18104557215"/>
            </instance>
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        </population>
        <population id="Golgis" type="populationList" component="Golgi_040408_C1" size="40">
            <instance id="0">
                <location y="89.170712019800007" x="122.06920101" z="461.205343889999995"/>
            </instance>
            <instance id="1">
                <location y="92.325658086800004" x="454.078873026999986" z="866.777384219000055"/>
            </instance>
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        </population>
        <population id="Purkinjes" type="populationList" component="purk2" size="20">
            <instance id="0">
                <location y="152.14756829800001" x="339.555430245000025" z="146.518598238999999"/>
            </instance>
            <instance id="1">
                <location y="177.888108878999986" x="964.875007817999972" z="272.437926472000015"/>
            </instance>
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        </population>
    </network>
</neuroml>
