<neuroml xmlns="http://www.neuroml.org/schema/neuroml2"  xmlns:xs="http://www.w3.org/2001/XMLSchema" xmlns:xsi="http://www.w3.org/2001/XMLSchema-instance" xsi:schemaLocation="http://www.neuroml.org/schema/neuroml2 https://raw.github.com/NeuroML/NeuroML2/development/Schemas/NeuroML2/NeuroML_v2beta4.xsd" id="Cerebellum3DDemo">
    <include href="MossyFiber.cell.nml"></include>
    <include href="Granule_98.cell.nml"></include>
    <include href="Golgi_98.cell.nml"></include>
    <include href="MF_AMPA.synapse.nml"></include>
    <include href="AMPA_GranGol.synapse.nml"></include>
    <include href="GABAA.synapse.nml"></include>
    <network id="Cerebellum3DDemo" type="networkWithTemperature" temperature="32.0 degC">
        <notes>Network generated using libNeuroML v0.2.12</notes>
        <population id="MossyFibers" component="MossyFiber" size="40" type="populationList">
            <instance id="0">
                <location x="966.453535691999946" y="44.073259917500003" z="7.49147005859"/>
            </instance>
            <instance id="1">
                <location x="910.975962449000008" y="93.926899736400003" z="582.227573058999951"/>
            </instance>
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        </population>
        <population id="Grans" component="Granule_98" size="40" type="populationList">
            <instance id="0">
                <location x="174.689918403000007" y="58.451181056499998" z="301.777057798999977"/>
            </instance>
            <instance id="1">
                <location x="812.851394358999983" y="53.434074784099998" z="499.587304193000023"/>
            </instance>
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        </population>
        <population id="Golgis" component="Golgi_98" size="20" type="populationList">
            <instance id="0">
                <location x="162.534292622999999" y="49.941602859600003" z="940.048073797000029"/>
            </instance>
            <instance id="1">
                <location x="950.182698605000041" y="13.9938681408" z="532.31378363500005"/>
            </instance>
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        </population>
        <projection id="NetConn_MossyFibers_Grans" presynapticPopulation="MossyFibers" postsynapticPopulation="Grans" synapse="MF_AMPA">
            <connection id="0" preCellId="../MossyFibers/0/MossyFiber" postCellId="../Grans/8/Granule_98"/>
            <connection id="1" preCellId="../MossyFibers/2/MossyFiber" postCellId="../Grans/12/Granule_98"/>
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        </projection>
        <projection id="NetConn_Grans_Golgis" presynapticPopulation="Grans" postsynapticPopulation="Golgis" synapse="AMPA_GranGol">
            <connection id="0" preCellId="../Grans/0/Granule_98" postCellId="../Golgis/3/Golgi_98"/>
            <connection id="1" preCellId="../Grans/0/Granule_98" postCellId="../Golgis/5/Golgi_98"/>
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        </projection>
        <projection id="NetConn_Golgis_Grans" presynapticPopulation="Golgis" postsynapticPopulation="Grans" synapse="GABAA">
            <connection id="0" preCellId="../Golgis/0/Golgi_98" postCellId="../Grans/4/Granule_98"/>
            <connection id="1" preCellId="../Golgis/0/Golgi_98" postCellId="../Grans/14/Granule_98"/>
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        </projection>
    </network>
</neuroml>
