<Lems>

    <!--

        This LEMS file has been automatically generated using PyNeuroML v0.1.10 (libNeuroML v0.2.12)

     -->

    <!-- Specify which component to run -->
    <Target component="Sim_GCL_200x30x200_4grc_4gol"/>

    <!-- Include core NeuroML2 ComponentType definitions -->
    <Include file="Cells.xml"/>
    <Include file="Networks.xml"/>
    <Include file="Simulation.xml"/>

    <Include file="Granule_98.cell.nml"/>
    <Include file="Gran_CaHVA_98.channel.nml"/>
    <Include file="Gran_CaPool_98.nml"/>
    <Include file="Gran_H_98.channel.nml"/>
    <Include file="Gran_KA_98.channel.nml"/>
    <Include file="Gran_KCa_98.channel.nml"/>
    <Include file="Gran_KDr_98.channel.nml"/>
    <Include file="Gran_NaF_98.channel.nml"/>
    <Include file="GranPassiveCond.channel.nml"/>
    <Include file="Golgi_98.cell.nml"/>
    <Include file="Golgi_CaHVA_CML.channel.nml"/>
    <Include file="Golgi_CaPool_CML.nml"/>
    <Include file="Golgi_H_CML.channel.nml"/>
    <Include file="Golgi_KA_CML.channel.nml"/>
    <Include file="Golgi_KCa_CML.channel.nml"/>
    <Include file="Golgi_KDr_CML.channel.nml"/>
    <Include file="Golgi_NaF_CML.channel.nml"/>
    <Include file="GolgiPassiveCond.channel.nml"/>
    <Include file="GCL_200x30x200_4grc_4gol.net.nml"/>
    <Include file="MossyFiber.cell.nml"/>
    <Include file="MFFastLeakCond.channel.nml"/>
    <Include file="Granule_98.cell.nml"/>
    <Include file="Gran_CaHVA_98.channel.nml"/>
    <Include file="Gran_CaPool_98.nml"/>
    <Include file="Gran_H_98.channel.nml"/>
    <Include file="Gran_KA_98.channel.nml"/>
    <Include file="Gran_KCa_98.channel.nml"/>
    <Include file="Gran_KDr_98.channel.nml"/>
    <Include file="Gran_NaF_98.channel.nml"/>
    <Include file="GranPassiveCond.channel.nml"/>
    <Include file="Golgi_98.cell.nml"/>
    <Include file="Golgi_CaHVA_CML.channel.nml"/>
    <Include file="Golgi_CaPool_CML.nml"/>
    <Include file="Golgi_H_CML.channel.nml"/>
    <Include file="Golgi_KA_CML.channel.nml"/>
    <Include file="Golgi_KCa_CML.channel.nml"/>
    <Include file="Golgi_KDr_CML.channel.nml"/>
    <Include file="Golgi_NaF_CML.channel.nml"/>
    <Include file="GolgiPassiveCond.channel.nml"/>
    <Include file="MF_AMPA.synapse.nml"/>
    <Include file="AMPA_GranGol.synapse.nml"/>
    <Include file="GABAA.synapse.nml"/>
    <Include file="MFSpikeSyn.synapse.nml"/>

    <Simulation id="Sim_GCL_200x30x200_4grc_4gol" length="100ms" step="0.01ms" target="GCL_200x30x200_4grc_4gol" seed="12345">  <!-- Note seed: ensures same random numbers used every run -->

        <Display id="display_mf" title="Voltages Mossy fibers" timeScale="1ms" xmin="-10.0" xmax="110.0" ymin="-70" ymax="10">
            <Line id="MF 0: Vm" quantity="MossyFibers/0/MossyFiber/v" scale="1mV" color="#d092e0" timeScale="1ms"/>
            <Line id="MF 1: Vm" quantity="MossyFibers/1/MossyFiber/v" scale="1mV" color="#4bb19d" timeScale="1ms"/>
            <Line id="MF 2: Vm" quantity="MossyFibers/2/MossyFiber/v" scale="1mV" color="#1fb661" timeScale="1ms"/>
            <Line id="MF 3: Vm" quantity="MossyFibers/3/MossyFiber/v" scale="1mV" color="#2f84ea" timeScale="1ms"/>
        </Display>

        <Display id="display_grc" title="Voltages Granule cells" timeScale="1ms" xmin="-10.0" xmax="110.0" ymin="-75" ymax="30">
            <Line id="GrC 0: Vm" quantity="Grans/0/Granule_98/v" scale="1mV" color="#6fa19d" timeScale="1ms"/>
            <Line id="GrC 1: Vm" quantity="Grans/1/Granule_98/v" scale="1mV" color="#1e956a" timeScale="1ms"/>
            <Line id="GrC 2: Vm" quantity="Grans/2/Granule_98/v" scale="1mV" color="#87a0ea" timeScale="1ms"/>
            <Line id="GrC 3: Vm" quantity="Grans/3/Granule_98/v" scale="1mV" color="#d454f1" timeScale="1ms"/>
        </Display>

        <Display id="display_gol" title="Voltages Golgi cells" timeScale="1ms" xmin="-10.0" xmax="110.0" ymin="-75" ymax="30">
            <Line id="Golgi 0: Vm" quantity="Golgis/0/Golgi_98/v" scale="1mV" color="#7c3624" timeScale="1ms"/>
            <Line id="Golgi 1: Vm" quantity="Golgis/1/Golgi_98/v" scale="1mV" color="#d15703" timeScale="1ms"/>
            <Line id="Golgi 2: Vm" quantity="Golgis/2/Golgi_98/v" scale="1mV" color="#a80948" timeScale="1ms"/>
            <Line id="Golgi 3: Vm" quantity="Golgis/3/Golgi_98/v" scale="1mV" color="#a41b65" timeScale="1ms"/>
        </Display>

        <OutputFile id="Volts_file_mf" fileName="v_mf.dat">
            <OutputColumn id="v_0" quantity="MossyFibers/0/MossyFiber/v"/>
            <OutputColumn id="v_1" quantity="MossyFibers/1/MossyFiber/v"/>
            <OutputColumn id="v_2" quantity="MossyFibers/2/MossyFiber/v"/>
            <OutputColumn id="v_3" quantity="MossyFibers/3/MossyFiber/v"/>
        </OutputFile>

        <OutputFile id="Volts_file_grc" fileName="v_grc.dat">
            <OutputColumn id="v_0" quantity="Grans/0/Granule_98/v"/>
            <OutputColumn id="v_1" quantity="Grans/1/Granule_98/v"/>
            <OutputColumn id="v_2" quantity="Grans/2/Granule_98/v"/>
            <OutputColumn id="v_3" quantity="Grans/3/Granule_98/v"/>
        </OutputFile>

        <OutputFile id="Volts_file_gol" fileName="v_gol.dat">
            <OutputColumn id="v_0" quantity="Golgis/0/Golgi_98/v"/>
            <OutputColumn id="v_1" quantity="Golgis/1/Golgi_98/v"/>
            <OutputColumn id="v_2" quantity="Golgis/2/Golgi_98/v"/>
            <OutputColumn id="v_3" quantity="Golgis/3/Golgi_98/v"/>
        </OutputFile>

    </Simulation>

</Lems>
