<?xml version="1.0" encoding="ISO-8859-1"?>
<neuroml xmlns="http://www.neuroml.org/schema/neuroml2" xmlns:xsi="http://www.w3.org/2001/XMLSchema-instance" xsi:schemaLocation="http://www.neuroml.org/schema/neuroml2 https://raw.github.com/NeuroML/NeuroML2/development/Schemas/NeuroML2/NeuroML_v2beta4.xsd" id="NMDA">

    <notes>ChannelML file describing a synaptic mechanism</notes>

    <blockingPlasticSynapse id="NMDA" gbase="1.873087796e-10S" tauRise="1e-3s" tauDecay="13.3333e-3s" erev="0V">

        <blockMechanism type="voltageConcDepBlockMechanism" species="mg" blockConcentration="1.2mM" scalingConc="1.9205441817997078mM" scalingVolt="0.016129032258064516V"/>

    </blockingPlasticSynapse>

</neuroml>
